*Heading
** Job name: Job-case1 Model name: symulacja_kadz
** Generated by: Abaqus/CAE 2019
*Preprint, echo=NO, model=NO, history=NO, contact=NO
**
** PARTS
**
*Part, name=izolacja
*Node
      1,   182.625885,   440.990814
      2,   182.118835,   430.981598
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*Element, type=DC2D3
   1, 787, 677, 517
   2, 677, 237, 517
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*Nset, nset=Set-1, generate
   1,  794,    1
*Elset, elset=Set-1, generate
    1,  1096,     1
*Nset, nset=Set-2, generate
   1,  794,    1
*Elset, elset=Set-2, generate
    1,  1096,     1
*Elset, elset=_izolacja_wew_S2, internal
    7,   21,   29,   30,   31,   32
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*Elset, elset=_izolacja_wew_S1, internal
  59,  66,  73,  80,  87, 344
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*Elset, elset=_izolacja_wew_S3, internal, generate
 232,  244,    4
*Surface, type=ELEMENT, name=izolacja_wew
_izolacja_wew_S2, S2
_izolacja_wew_S1, S1
_izolacja_wew_S3, S3
*Elset, elset=_izolacja_zew_S2, internal
    2,    3,    4,    5,    6,   25
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*Elset, elset=_izolacja_zew_S3, internal
 229, 233, 241, 328
*Elset, elset=_izolacja_zew_S1, internal
 282, 285, 288, 291, 294, 421
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*Surface, type=ELEMENT, name=izolacja_zew
_izolacja_zew_S2, S2
_izolacja_zew_S3, S3
_izolacja_zew_S1, S1
*Elset, elset=_izolacja_otoczenie_S2, internal
  386,  543, 1057, 1081
*Surface, type=ELEMENT, name=izolacja_otoczenie
_izolacja_otoczenie_S2, S2
** Section: warstwa_ochronna
*Solid Section, elset=Set-2, material=warstwa_ochronna
,
*End Part
**
*Part, name=pancerz
*Node
      1,   10.0647058,           0.
      2,   20.1294117,           0.
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*Element, type=DC2D3
  1, 351, 256, 104
  2,  17, 257, 104
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*Nset, nset=Set-1, generate
   1,  498,    1
*Elset, elset=Set-1, generate
   1,  496,    1
*Elset, elset=_pancerz_zew_S1, internal
   2,  13,  15,  17,  19,  40
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*Elset, elset=_pancerz_zew_S2, internal
   4,   5,   6,   7,   8,  21
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*Elset, elset=_pancerz_zew_S3, internal
   9,  38,  39,  47,  50,  57
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*Surface, type=ELEMENT, name=pancerz_zew
_pancerz_zew_S1, S1
_pancerz_zew_S2, S2
_pancerz_zew_S3, S3
*Elset, elset=_pancerz_wew_S3, internal
   1,   3,  11,  12,  14,  16
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*Elset, elset=_pancerz_wew_S2, internal
  10,  18,  20,  22,  24,  83
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*Elset, elset=_pancerz_wew_S1, internal
  29,  30,  36,  37,  64,  65
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*Surface, type=ELEMENT, name=pancerz_wew
_pancerz_wew_S3, S3
_pancerz_wew_S2, S2
_pancerz_wew_S1, S1
** Section: powloka_stalowa
*Solid Section, elset=Set-1, material=powloka_stalowa
,
*End Part
**
*Part, name=stal
*Node
      1,   142.823883,   50.5999985
      2,   143.077179,   55.5999985
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*Element, type=DC2D3
   1,    1,    2,   62
   2,   62,   61,    1
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*Nset, nset=Set-1, generate
    1,  3720,     1
*Elset, elset=Set-1, generate
    1,  7198,     1
*Elset, elset=_stal_wymurowka_S2, internal, generate
    2,  7082,   118
*Elset, elset=_stal_wymurowka_S1, internal
    1,    3,    5,    7,    9,   11
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*Surface, type=ELEMENT, name=stal_wymurowka
_stal_wymurowka_S2, S2
_stal_wymurowka_S1, S1
*Elset, elset=_stal_zuzel_S2, internal, generate
  117,  7197,   118
*Surface, type=ELEMENT, name=stal_zuzel
_stal_zuzel_S2, S2
** Section: kapeil_metalowa
*Solid Section, elset=Set-1, material=kapiel_metalowa
,
*End Part
**
*Part, name=wymurowka
*Node
      1,   10.0672817,   15.6000004
      2,   25.1682053,   15.6000004
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*Element, type=DC2D3
   1,  104,  535,  289
   2, 1342, 1227, 1282
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*Nset, nset=Set-1, generate
    1,  1437,     1
*Elset, elset=Set-1, generate
    1,  2408,     1
*Elset, elset=_wymurowka_zew_S2, internal
    4,    7,   21,   24,   41,   47
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*Elset, elset=_wymurowka_zew_S1, internal
 363, 379, 483, 486, 487, 666
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*Elset, elset=_wymurowka_zew_S3, internal
 158, 159, 160, 161, 162, 163, 164, 165, 172, 360, 361, 377, 403, 412, 417, 422
*Surface, type=ELEMENT, name=wymurowka_zew
_wymurowka_zew_S2, S2
_wymurowka_zew_S1, S1
_wymurowka_zew_S3, S3
*Elset, elset=_wymurowka_stal_S2, internal
   52,   58,   68,   69,   70,   71
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*Elset, elset=_wymurowka_stal_S1, internal
   1,  13,  35, 202, 203, 213
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*Elset, elset=_wymurowka_stal_S3, internal
  11,  33,  51,  57, 352, 366, 373
*Surface, type=ELEMENT, name=wymurowka_stal
_wymurowka_stal_S2, S2
_wymurowka_stal_S1, S1
_wymurowka_stal_S3, S3
*Elset, elset=_wymurowka_zuzel_S2, internal
 188, 435, 609
*Elset, elset=_wymurowka_zuzel_S1, internal
 434, 439, 713
*Surface, type=ELEMENT, name=wymurowka_zuzel
_wymurowka_zuzel_S2, S2
_wymurowka_zuzel_S1, S1
*Elset, elset=_wymorowka_otoczenie_S2, internal
  144,  145,  150,  184,  186,  187
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*Elset, elset=_wymorowka_otoczenie_S1, internal
 706, 709, 797, 801, 802, 803
*Surface, type=ELEMENT, name=wymorowka_otoczenie
_wymorowka_otoczenie_S2, S2
_wymorowka_otoczenie_S1, S1
** Section: warstwa_robocza
*Solid Section, elset=Set-1, material=warstwa_robocza
,
*End Part
**
*Part, name=zuzel
*Node
      1,   157.767944,   345.600006
      2,     157.9207,   346.600006
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*Element, type=DC2D3
   1,    1,    2,    8
   2,    8,    7,    1
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*Nset, nset=Set-1, generate
    1,  1908,     1
*Elset, elset=Set-1, generate
    1,  3170,     1
*Elset, elset=_zuzel_toczenie_S2, internal, generate
    9,  3169,    10
*Surface, type=ELEMENT, name=zuzel_toczenie
_zuzel_toczenie_S2, S2
*Elset, elset=_zuzel_wymorowka_S1, internal
    1,    3,    5,    7,    9, 3162, 3164, 3166, 3168, 3170
*Surface, type=ELEMENT, name=zuzel_wymorowka
_zuzel_wymorowka_S1, S1
*Elset, elset=_zuzel_stal_S2, internal, generate
    2,  3162,    10
*Surface, type=ELEMENT, name=zuzel_stal
_zuzel_stal_S2, S2
** Section: zuzel
*Solid Section, elset=Set-1, material=zuzel
,
*End Part
**
**
** ASSEMBLY
**
*Assembly, name=Assembly
**
*Instance, name=izolacja-1, part=izolacja
*End Instance
**
*Instance, name=pancerz-1, part=pancerz
*End Instance
**
*Instance, name=stal-1, part=stal
*End Instance
**
*Instance, name=wymurowka-1, part=wymurowka
*End Instance
**
*Instance, name=zuzel-1, part=zuzel
*End Instance
**
*Nset, nset=Set-1, instance=stal-1, generate
    1,  3720,     1
*Nset, nset=Set-1, instance=zuzel-1, generate
    1,  1908,     1
*Elset, elset=Set-1, instance=stal-1, generate
    1,  7198,     1
*Elset, elset=Set-1, instance=zuzel-1, generate
    1,  3170,     1
*Nset, nset=Set-2, instance=izolacja-1, generate
   1,  794,    1
*Nset, nset=Set-2, instance=pancerz-1, generate
   1,  498,    1
*Nset, nset=Set-2, instance=wymurowka-1, generate
    1,  1437,     1
*Elset, elset=Set-2, instance=izolacja-1, generate
    1,  1096,     1
*Elset, elset=Set-2, instance=pancerz-1, generate
   1,  496,    1
*Elset, elset=Set-2, instance=wymurowka-1, generate
    1,  2408,     1
*Nset, nset=Set-3, instance=izolacja-1, generate
   1,  794,    1
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*Elset, elset=Set-3, instance=izolacja-1, generate
    1,  1096,     1
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*Nset, nset=Set-5, instance=zuzel-1
 949,
*Nset, nset=Set-23, instance=stal-1, generate
    1,  3720,     1
*Elset, elset=Set-23, instance=stal-1, generate
    1,  7198,     1
*Nset, nset=_PickedSet75, internal, instance=wymurowka-1, generate
    1,  1437,     1
*Elset, elset=_PickedSet75, internal, instance=wymurowka-1, generate
    1,  2408,     1
*Nset, nset=_PickedSet76, internal, instance=izolacja-1, generate
   1,  794,    1
*Nset, nset=_PickedSet76, internal, instance=pancerz-1, generate
   1,  498,    1
*Elset, elset=_PickedSet76, internal, instance=izolacja-1, generate
    1,  1096,     1
*Elset, elset=_PickedSet76, internal, instance=pancerz-1, generate
   1,  496,    1
*Elset, elset=__PickedSurf73_S1, internal, instance=pancerz-1
   2,  40,  41,  42,  52,  87
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*Elset, elset=__PickedSurf73_S2, internal, instance=pancerz-1
   4,   5,   6,   7,   8,  18
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*Elset, elset=__PickedSurf73_S3, internal, instance=pancerz-1
   1,   9,  12,  14,  16,  38
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*Surface, type=ELEMENT, name=_PickedSurf73, internal
__PickedSurf73_S1, S1
__PickedSurf73_S2, S2
__PickedSurf73_S3, S3
*Elset, elset=__PickedSurf74_S2, internal, instance=zuzel-1, generate
    9,  3169,    10
*Surface, type=ELEMENT, name=_PickedSurf74, internal
__PickedSurf74_S2, S2
** Constraint: Constraint-1
*Tie, name=Constraint-1, adjust=no, position tolerance=1.
wymurowka-1.wymurowka_zew, izolacja-1.izolacja_wew
** Constraint: Constraint-2
*Tie, name=Constraint-2, adjust=no, position tolerance=1.
zuzel-1.zuzel_wymorowka, wymurowka-1.wymurowka_zuzel
** Constraint: Constraint-3
*Tie, name=Constraint-3, adjust=no, position tolerance=1.
zuzel-1.zuzel_stal, stal-1.stal_zuzel
** Constraint: Constraint-4
*Tie, name=Constraint-4, adjust=no, position tolerance=100., type=SURFACE TO SURFACE
wymurowka-1.wymurowka_stal, stal-1.stal_wymurowka
** Constraint: Constraint-5
*Tie, name=Constraint-5, adjust=no, position tolerance=1.
pancerz-1.pancerz_wew, izolacja-1.izolacja_zew
*End Assembly
**
** MATERIALS
**
*Material, name=kapiel_metalowa
*Conductivity
 0.41,
*Density
 0.0071,
*Specific Heat
750.,
*Material, name=powloka_stalowa
*Conductivity
 0.52,
*Density
 0.00803,
*Specific Heat
787.,
*Material, name=warstwa_ochronna
*Conductivity
 0.0095,
*Density
 0.00275,
*Specific Heat
1056.,
*Material, name=warstwa_robocza
*Conductivity
 0.0364,
*Density
 0.003,
*Specific Heat
1039.,
*Material, name=zuzel
*Conductivity
 0.0121,
*Density
 0.003807,
*Specific Heat
838.,
**
** INTERACTION PROPERTIES
**
*Surface Interaction, name=IntProp-1
1.,
*Gap Conductance
 0.4,    0.
  0., 0.005
**
** PHYSICAL CONSTANTS
**
*Physical Constants, absolute zero=-273.15, stefan boltzmann=5.669e-12
**
** PREDEFINED FIELDS
**
** Name: outer_core   Type: Temperature
*Initial Conditions, type=TEMPERATURE
_PickedSet76, 700.
** Name: temp_kadz   Type: Temperature
*Initial Conditions, type=TEMPERATURE
_PickedSet75, 1400.
** Name: temp_stal_zuzel   Type: Temperature
*Initial Conditions, type=TEMPERATURE
Set-1, 1587.
** ----------------------------------------------------------------
**
** STEP: Step-1
**
*Step, name=Step-1, nlgeom=NO, inc=50000
*Heat Transfer, end=PERIOD, deltmx=100.
0.1, 1836., 1e-06, 1.,
**
** INTERACTIONS
**
** Interaction: izolacja_otoczenie
*Sfilm
izolacja-1.izolacja_otoczenie, F, 45., 0.0012
** Interaction: pancerz_otoczenie
*Sfilm
pancerz-1.pancerz_zew, F, 45., 0.0012
** Interaction: radiation-obudowa
*Sradiate
_PickedSurf73, R, 45., 0.5
** Interaction: radiation-zuzel
*Sradiate
_PickedSurf74, R, 45., 0.8
** Interaction: wymurowka_otoczenie
*Sfilm
wymurowka-1.wymorowka_otoczenie, F, 45., 0.0012
** Interaction: zuzel_otoczenie
*Sfilm
zuzel-1.zuzel_toczenie, F, 45., 0.0012
**
** OUTPUT REQUESTS
**
*Restart, write, frequency=0
*Monitor, dof=11, node=Set-5, frequency=1
**
** FIELD OUTPUT: F-Output-1
**
*Output, field
*Node Output
NT, RFL
*Element Output, directions=YES
HFL, TEMP
**
** HISTORY OUTPUT: H-Output-1
**
*Output, history
*Node Output, nset=Set-1
NT,
*End Step
